*Heading
 Stretch the body in the y direction
** Job name: stretch_y Model name: Model-1
** Generated by: Nathan Miller
** A micromorphic finite element test which deforms
** the given element by stretching it in the y
** direction.
** We hold all of the micro-degrees of freedomm on
** the symmetry boundaries to zero.
*Preprint, echo=NO, model=NO, history=NO, contact=NO
**
** PARTS
**
*Part, name=Part-1
*Node
      1,           1.,           1.,           2.
      2,           1.,           0.,           2.
      3,           1.,          -1.,           2.
      4,           1.,           1.,           1.
      5,           1.,           0.,           1.
      6,           1.,          -1.,           1.
      7,           1.,           1.,           0.
      8,           1.,           0.,           0.
      9,           1.,          -1.,           0.
     10,           0.,           1.,           2.
     11,           0.,           0.,           2.
     12,           0.,          -1.,           2.
     13,           0.,           1.,           1.
     14,           0.,           0.,           1.
     15,           0.,          -1.,           1.
     16,           0.,           1.,           0.
     17,           0.,           0.,           0.
     18,           0.,          -1.,           0.
     19,          -1.,           1.,           2.
     20,          -1.,           0.,           2.
     21,          -1.,          -1.,           2.
     22,          -1.,           1.,           1.
     23,          -1.,           0.,           1.
     24,          -1.,          -1.,           1.
     25,          -1.,           1.,           0.
     26,          -1.,           0.,           0.
     27,          -1.,          -1.,           0.
*INCLUDE, INPUT=../../hex8_linear_elasticity.inp

*ELEMENT, TYPE=U1
1, 10, 11, 14, 13,  1,  2,  5,  4
2, 11, 12, 15, 14,  2,  3,  6,  5
3, 13, 14, 17, 16,  4,  5,  8,  7
4, 14, 15, 18, 17,  5,  6,  9,  8
5, 19, 20, 23, 22, 10, 11, 14, 13
6, 20, 21, 24, 23, 11, 12, 15, 14
7, 22, 23, 26, 25, 13, 14, 17, 16
8, 23, 24, 27, 26, 14, 15, 18, 17
*Nset, nset=Set-1, generate
  1,  27,   1
*Elset, elset=Set-1, generate
 1,  8,  1
*ELSET, ELSET=U1_SET, GENERATE
 1,  8,  1
*End Part
**
**
** ASSEMBLY
**
*Assembly, name=Assembly
**
*Instance, name=Part-1-1, part=Part-1
*End Instance
**
*Nset, nset=Set-1, instance=Part-1-1, generate
  3,  27,   3
*Elset, elset=Set-1, instance=Part-1-1, generate
 2,  8,  2
*Nset, nset=Set-2, instance=Part-1-1, generate
 19,  27,   1
*Elset, elset=Set-2, instance=Part-1-1, generate
 5,  8,  1
*Nset, nset=Set-3, instance=Part-1-1
  7,  8,  9, 16, 17, 18, 25, 26, 27
*Elset, elset=Set-3, instance=Part-1-1
 3, 4, 7, 8
*Nset, nset=Set-4, instance=Part-1-1, generate
 19,  27,   1
*Elset, elset=Set-4, instance=Part-1-1, generate
 5,  8,  1
*Nset, nset=Set-5, instance=Part-1-1, generate
  3,  27,   3
*Elset, elset=Set-5, instance=Part-1-1, generate
 2,  8,  2
*Nset, nset=Set-6, instance=Part-1-1, generate
  1,  25,   3
*Elset, elset=Set-6, instance=Part-1-1, generate
 1,  7,  2
*Nset, nset=All_nodes, instance=Part-1-1, generate
 1, 27,  1
*End Assembly
** ----------------------------------------------------------------
**
** STEP: load
**
*Step, name=load, nlgeom=NO
Apply deformation to model
*Static
0.1, 1.0, 1e-05, 0.1
**
** BOUNDARY CONDITIONS
**
** Name: deform_y Type: Displacement/Rotation
*Boundary
Set-6, 2, 2, 0.1
** Name: fix_x Type: Displacement/Rotation
*Boundary
Set-4, 1, 1
** Name: fix_y Type: Displacement/Rotation
*Boundary
Set-5, 2, 2
** Name: fix_z Type: Displacement/Rotation
*Boundary
Set-3, 3, 3
** Name: fix_micro_x Type: Microdisplacement
** Set-4, 12, 12
** 101, 109
** Name: fix_micro_y Type: Microdisplacement
**Set-5, 13, 13
** 101, 109
** Name: fix_micro_z Type: Microdisplacement
** Set-3, 14, 14
**All_nodes, 15, 20
** 101, 109
**
** OUTPUT REQUESTS
**
*Restart, write, frequency=0
**
** FIELD OUTPUT: F-Output-2
**
*Output, field
*Node Output
U,NT,
*Element Output
SDV,
**
** FIELD OUTPUT: F-Output-1
**
***Output, field, variable=PRESELECT
**
** HISTORY OUTPUT: H-Output-1
**
***Output, history, variable=PRESELECT
*End Step
